<?xml version="1.0"?>
<!-- Generated by Javaprop
-->

<propeller name="prop">
  <ixx> 1e-4 </ixx>
  <diameter unit="IN">  5.5 </diameter>
  <numblades> 2 </numblades>
  <gearratio>1.0 </gearratio>
  <ct_factor>1.0 </ct_factor>
  <cp_factor>1.0 </cp_factor>

  <table name="C_THRUST" type="internal">
     <tableData>
0.00	0.088784
0.05	0.091205
0.10	0.090752
0.15	0.089925
0.20	0.088593
0.25	0.086674
0.30	0.084053
0.35	0.080709
0.40	0.076332
0.45	0.070568
0.50	0.063187
0.55	0.055458
0.60	0.047475
0.65	0.039233
0.70	0.030741
0.71	0.029014
0.72	0.027279
0.73	0.025533
0.74	0.023780
0.75	0.022018
0.76	0.020248
0.77	0.018470
0.78	0.016683
0.79	0.014887
0.80	0.013086
0.81	0.011274
0.82	0.009459
0.83	0.007626
0.84	0.005791
0.85	0.003949
0.86	0.002076
0.87	0.000208
0.88	-0.001676
0.89	-0.003521
0.90	-0.005448
0.91	-0.007298
0.92	-0.009234
     </tableData>
  </table>


  <table name="C_POWER" type="internal">
     <tableData>
0.00	0.048163
0.05	0.047685
0.10	0.047684
0.15	0.047603
0.20	0.048065
0.25	0.048509
0.30	0.049003
0.35	0.049322
0.40	0.049003
0.45	0.047900
0.50	0.045619
0.55	0.042672
0.60	0.039115
0.65	0.034900
0.70	0.029989
0.71	0.028920
0.72	0.027823
0.73	0.026695
0.74	0.025539
0.75	0.024353
0.76	0.023136
0.77	0.021891
0.78	0.020614
0.79	0.019306
0.80	0.017969
0.81	0.016598
0.82	0.015201
0.83	0.013764
0.84	0.012300
0.85	0.010804
0.86	0.009257
0.87	0.007688
0.88	0.006079
0.89	0.004477
0.90	0.002777
0.91	0.001121
0.92	-0.000641
     </tableData>
  </table>

</propeller>
